*Heading
** Job name: SingleScratch Model name: Model-1
** Generated by: Abaqus/CAE 2025
*Preprint, echo=NO, model=NO, history=NO, contact=NO
**
** PARTS
**
*Part, name=RockwellIndenter
*End Part
**
*Part, name=Substrate
*Node
      1,  0.239999995,  0.439999998,         2.75
      2,           0.,  0.439999998,         2.75
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*Element, type=C3D8R
   1,  188, 1211, 2975,  715,    1,   29,  675,   46
   2, 1211, 1212, 2976, 2975,   29,   30,  676,  675
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*Nset, nset=SubstrateSet, generate
    1,  5040,     1
*Elset, elset=SubstrateSet, generate
    1,  3864,     1
*Nset, nset=RefinedArea
    1,    2,    5,    6,    9,   10
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*Elset, elset=RefinedArea, generate
 1891,  2646,     1
** Section: SubstrateSection
*Solid Section, elset=SubstrateSet, controls=EC-1, material=SubstrateMaterial
,
*End Part
**
**
** ASSEMBLY
**
*Assembly, name=Assembly
**
*Instance, name=RockwellIndenterInst, part=RockwellIndenter
          0.,          0.5,         0.25
*Node
      1, -3.67394056e-17,           0.,           0.
*Nset, nset=RockwellIndenterInst-RefPt_, internal
1,
*Nset, nset=RockwellIndenterSet
 1,
*Surface, type=REVOLUTION, name=m_Surf-1
START, 0.533012701892219, 0.276794919243112
 LINE,          0.1, 0.0267949192431123
 CIRCL,           0.,           0.,           0.,          0.2
*Rigid Body, ref node=RockwellIndenterInst-RefPt_, analytical surface=m_Surf-1
*Element, type=MASS, elset=RockwellIndenterSet_IndenterInertia_
1, 1
*Mass, elset=RockwellIndenterSet_IndenterInertia_
1.,
*End Instance
**
*Instance, name=SubstrateInst, part=Substrate
*End Instance
**
*Nset, nset=ALE_Domain, instance=SubstrateInst, generate
    1,  5040,     1
*Elset, elset=ALE_Domain, instance=SubstrateInst, generate
    1,  3864,     1
*Nset, nset=FIXEDBCSET, instance=SubstrateInst
    3,    4,    7,    8,   15,   16
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*Elset, elset=FIXEDBCSET, instance=SubstrateInst
   25,   26,   27,   28,   29,   30
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*Nset, nset=XsymmetryBCSet, instance=SubstrateInst
    2,    3,    6,    7,   10,   12
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*Elset, elset=XsymmetryBCSet, instance=SubstrateInst
    6,   12,   18,   24,   30,   36
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*Nset, nset=contactRegionNodes, instance=SubstrateInst
    9,   10,   11,   12,  314,  315
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*Elset, elset=_s_Surf-1_S5, internal, instance=SubstrateInst
 1897, 1898, 1899, 1900, 1901, 1902
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*Surface, type=ELEMENT, name=s_Surf-1
_s_Surf-1_S5, S5
*End Assembly
**
** ELEMENT CONTROLS
**
*Section Controls, name=EC-1, ELEMENT DELETION=NO, MAX DEGRADATION=0.9, hourglass=RELAX STIFFNESS
1., 1., 1.
*Amplitude, name=Amp-Depth, time=TOTAL TIME
             0.,              0.,            0.01,              1.,            1.01,              1.,            1.02, -0.833333333333333
           1.52, -0.833333333333333
*Amplitude, name=Amp-Length, time=TOTAL TIME
             0.,              0.,            0.01,              0.,            1.01,              1.,            1.02,              1.
           1.52,              1.
**
** MATERIALS
**
*Material, name=SubstrateMaterial
*Density
 1.2e-09,
*Hyperelastic, mooney-rivlin
300.,  30., 0.01
**
** INTERACTION PROPERTIES
**
*Surface Interaction, name=IntProp-1
*Friction
 0.3,
*Surface Behavior, pressure-overclosure=HARD
**
** INTERACTIONS
**
** Interaction: Int-1
*Contact, op=NEW
*Contact Inclusions
RockwellIndenterInst.m_Surf-1 , s_Surf-1
*Contact Property Assignment
 ,  , IntProp-1
** ----------------------------------------------------------------
**
** STEP: IndentationStep
**
*Step, name=IndentationStep, nlgeom=YES
*Dynamic, Explicit
, 0.01
*Bulk Viscosity
0.06, 1.2
** Mass Scaling: Semi-Automatic
**               Whole Model
*Fixed Mass Scaling, factor=500.
**
** BOUNDARY CONDITIONS
**
** Name: Fixed_constraint Type: Symmetry/Antisymmetry/Encastre
*Boundary
FIXEDBCSET, ENCASTRE
** Name: IndenterConstraint Type: Displacement/Rotation
*Boundary
RockwellIndenterInst.RockwellIndenterSet, 1, 1
RockwellIndenterInst.RockwellIndenterSet, 4, 4
RockwellIndenterInst.RockwellIndenterSet, 5, 5
RockwellIndenterInst.RockwellIndenterSet, 6, 6
** Name: IndenterDepth Type: Displacement/Rotation
*Boundary, amplitude=Amp-Depth
RockwellIndenterInst.RockwellIndenterSet, 2, 2, -0.06
** Name: IndenterTravel Type: Displacement/Rotation
*Boundary, amplitude=Amp-Length
RockwellIndenterInst.RockwellIndenterSet, 3, 3, 2.
** Name: x_axis_symmetry Type: Symmetry/Antisymmetry/Encastre
*Boundary
XsymmetryBCSet, XSYMM
*Adaptive Mesh Controls, name=Ada-1, geometric enhancement=YES, smoothing objective=GRADED
1., 0., 0.
*Adaptive Mesh, elset=ALE_Domain, controls=Ada-1, frequency=20, op=NEW
**
** INTERACTIONS
**
** Interaction: Int-1
*Contact, op=NEW
*Contact Inclusions
RockwellIndenterInst.m_Surf-1 , s_Surf-1
*Contact Property Assignment
 ,  , IntProp-1
**
** OUTPUT REQUESTS
**
*Restart, write, number interval=1, time marks=NO
**
** FIELD OUTPUT: FieldOutput
**
*Output, field, time interval=0.001
*Node Output, nset=SubstrateInst.SubstrateSet
COORD, U
*Element Output, elset=SubstrateInst.SubstrateSet, directions=YES
COORD, LE, MISES, NE, PE, PEEQ, PRESS, S, SDEG, SDV, STATUS, TRIAX
*Contact Output, variable=PRESELECT
**
** FIELD OUTPUT: ContactForce
**
*Output, field, time interval=0.025
*Contact Output
CFORCE,
**
** HISTORY OUTPUT: EnergyBalance
**
*Output, history, time interval=0.01
*Energy Output
ETOTAL,
**
** HISTORY OUTPUT: ReactionForces
**
*Node Output, nset=RockwellIndenterInst.RockwellIndenterSet
RF1, RF2, RF3
**
** HISTORY OUTPUT: Energy
**
*Energy Output, elset=SubstrateInst.SubstrateSet
ALLAE, ALLIE, ALLKE, ALLPW
*End Step
** ----------------------------------------------------------------
**
** STEP: ScratchStep
**
*Step, name=ScratchStep, nlgeom=YES
*Dynamic, Explicit
, 1.
*Bulk Viscosity
0.06, 1.2
** Mass Scaling: Semi-Automatic
**               Whole Model
*Fixed Mass Scaling, factor=500.
*Adaptive Mesh, elset=ALE_Domain, controls=Ada-1, frequency=20, op=NEW
**
** OUTPUT REQUESTS
**
*Restart, write, number interval=1, time marks=NO
**
** FIELD OUTPUT: FieldOutput
**
*Output, field, time interval=0.001
*Node Output, nset=SubstrateInst.SubstrateSet
COORD, U
*Element Output, elset=SubstrateInst.SubstrateSet, directions=YES
COORD, LE, MISES, NE, PE, PEEQ, PRESS, S, SDEG, SDV, STATUS, TRIAX
*Contact Output, variable=PRESELECT
**
** FIELD OUTPUT: ContactForce
**
*Output, field, time interval=0.025
*Contact Output
CFORCE,
**
** HISTORY OUTPUT: EnergyBalance
**
*Output, history, time interval=0.01
*Energy Output
ETOTAL,
**
** HISTORY OUTPUT: ReactionForces
**
*Node Output, nset=RockwellIndenterInst.RockwellIndenterSet
RF1, RF2, RF3
**
** HISTORY OUTPUT: Energy
**
*Energy Output, elset=SubstrateInst.SubstrateSet
ALLAE, ALLIE, ALLKE, ALLPW
*End Step
** ----------------------------------------------------------------
**
** STEP: UnloadStep
**
*Step, name=UnloadStep, nlgeom=YES
*Dynamic, Explicit
, 0.01
*Bulk Viscosity
0.06, 1.2
*Adaptive Mesh, elset=ALE_Domain, controls=Ada-1, frequency=400, initial mesh sweeps=1, op=NEW
**
** OUTPUT REQUESTS
**
*Restart, write, number interval=1, time marks=NO
**
** FIELD OUTPUT: FieldOutput
**
*Output, field, time interval=0.00025
*Node Output, nset=SubstrateInst.SubstrateSet
COORD, U
*Element Output, elset=SubstrateInst.SubstrateSet, directions=YES
COORD, LE, MISES, NE, PE, PEEQ, PRESS, S, SDEG, SDV, STATUS, TRIAX
*Contact Output, variable=PRESELECT
*Output, history, frequency=0
*End Step
** ----------------------------------------------------------------
**
** STEP: RecoveryStep
**
*Step, name=RecoveryStep, nlgeom=YES
*Dynamic, Explicit
, 0.5
*Bulk Viscosity
0.06, 1.2
*Adaptive Mesh, elset=ALE_Domain, controls=Ada-1, frequency=1000, initial mesh sweeps=1, op=NEW
**
** OUTPUT REQUESTS
**
*Restart, write, number interval=1, time marks=NO
**
** FIELD OUTPUT: FieldOutput
**
*Output, field, time interval=0.025
*Node Output, nset=SubstrateInst.SubstrateSet
COORD, U
*Element Output, elset=SubstrateInst.SubstrateSet, directions=YES
COORD, LE, MISES, NE, PE, PEEQ, PRESS, S, SDEG, SDV, STATUS, TRIAX
*Contact Output, variable=PRESELECT
*Output, history, frequency=0
*End Step
